// COMSOL Multiphysics 4.4.0.195 model "N2_Itikawa.mph"
// Outline of the model tree

Parameters
  E = 3.2171e3 [V/m]  // electric field
  Pg = 1 [Torr]  // gas pressure
  Tg = 300 [K]  // gas temp
  Ng = 2.6868e25 [1/m^3] * Pg/(760 [Torr]) * (273 [K]/Tg)  // number density
  EN = E/Ng/(1e-21 [V*m^2])  // reduced E (Td)

Geometry
  geom1 "Geometry 1" (1D, length unit m)
    i1: Interval | intervals = one; p = {0, 100}
    fin: Finalize "Form Union"

Physics
  be: Boltzmann "Boltzmann Equation, Two-Term Approximation" on all domains
    dependent variable f
    eedf.eedf = bolt
    CrossSectionImport.Filepath = /Users/angus/CPP_testing/firstCode/xsecsN2_Itikawa_COMSOL.txt
    bmdl1: BoltzmannModel (default)
    init1: init "Initial Values 1" (default) | ebarinit = 6[V]; Td0 = 62
    col1: CollisionFeature "1: e+N2X1=>e+N2X1" on all domains
      cSeqNo = 1
      mratio = 0.1958E-04
      xscale = 1
      yscale = 1
      type = Elastic
      xdata = {0.000000e+0, 1.000000e-2, 1.500000e-2, 2.000000e-2, 3.000000e-2, 4.000000e-2, 5.000000e-2, 7.000000e-2, 1.000000e-1, 1.200000e-1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}
      ydata = {1.100000e-20, 2.190000e-20, 2.550000e-20, 2.850000e-20, 3.380000e-20, 3.820000e-20, 4.300000e-20, 5.080000e-20, 5.920000e-20, 6.420000e-20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}
      formula = e+N2X1=>e+N2X1
      targetName = N2X1
      targetLabel = N2X1
    col2: CollisionFeature "2: e+N2X1=>e+N2A3" on all domains
      cSeqNo = 2
      de = 6.200
      xscale = 1
      yscale = 1
      type = Excitation
      xdata = {6.169000e+0, 7.650000e+0, 7.960000e+0, 8.260000e+0, 8.520000e+0, 8.740000e+0, 9.570000e+0, 1.040000e+1, 1.096000e+1, 1.153000e+1, 1.188000e+1, 1.197000e+1, 1.210000e+1, 1.223000e+1, 1.254000e+1, 1.315000e+1, 1.390000e+1, 1.485000e+1, 1.500000e+1, 1.600000e+1, 1.700000e+1, 1.800000e+1, 1.900000e+1, 2.000000e+1, 2.500000e+1, 3.000000e+1, 3.500000e+1, 4.000000e+1, 4.500000e+1, 5.000000e+1}
      ydata = {0.000000e+0, 5.000000e-23, 4.800000e-22, 8.500000e-22, 1.250000e-21, 1.370000e-21, 1.530000e-21, 1.680000e-21, 1.830000e-21, 2.260000e-21, 2.510000e-21, 2.540000e-21, 2.570000e-21, 2.540000e-21, 2.390000e-21, 2.020000e-21, 1.800000e-21, 1.620000e-21, 1.600000e-21, 1.520000e-21, 1.450000e-21, 1.380000e-21, 1.320000e-21, 1.260000e-21, 9.900000e-22, 7.800000e-22, 6.200000e-22, 4.900000e-22, 3.800000e-22, 3.000000e-22}
      formula = e+N2X1=>e+N2A3
      targetName = N2X1
      targetLabel = N2X1
    col3: CollisionFeature "3: e+N2X1=>e+N2B3" on all domains
      cSeqNo = 3
      de = 7.35
      xscale = 1
      yscale = 1
      type = Excitation
      xdata = {7.353000e+0, 8.550000e+0, 9.000000e+0, 9.500000e+0, 1.000000e+1, 1.050000e+1, 1.100000e+1, 1.150000e+1, 1.200000e+1, 1.250000e+1, 1.300000e+1, 1.350000e+1, 1.400000e+1, 1.450000e+1, 1.500000e+1, 1.600000e+1, 1.700000e+1, 1.800000e+1, 1.900000e+1, 2.000000e+1, 2.500000e+1, 3.000000e+1, 3.500000e+1, 4.000000e+1, 4.500000e+1, 5.000000e+1}
      ydata = {0.000000e+0, 2.000000e-23, 1.410000e-21, 2.020000e-21, 2.500000e-21, 2.870000e-21, 3.130000e-21, 3.300000e-21, 3.380000e-21, 3.390000e-21, 3.330000e-21, 3.230000e-21, 3.080000e-21, 2.900000e-21, 2.700000e-21, 2.240000e-21, 1.990000e-21, 1.770000e-21, 1.590000e-21, 1.440000e-21, 9.200000e-22, 6.400000e-22, 4.900000e-22, 3.600000e-22, 2.800000e-22, 2.300000e-22}
      formula = e+N2X1=>e+N2B3
      targetName = N2X1
      targetLabel = N2X1
    col4: CollisionFeature "4: e+N2X1=>e+N2W3" on all domains
      cSeqNo = 4
      de = 7.362
      xscale = 1
      yscale = 1
      type = Excitation
      xdata = {7.362000e+0, 9.000000e+0, 9.500000e+0, 1.000000e+1, 1.050000e+1, 1.100000e+1, 1.150000e+1, 1.200000e+1, 1.250000e+1, 1.300000e+1, 1.350000e+1, 1.400000e+1, 1.450000e+1, 1.500000e+1, 1.600000e+1, 1.650000e+1, 1.700000e+1, 1.800000e+1, 1.900000e+1, 2.000000e+1, 2.500000e+1, 3.000000e+1, 3.500000e+1, 4.000000e+1, 4.500000e+1, 5.000000e+1}
      ydata = {0.000000e+0, 1.700000e-22, 4.500000e-22, 7.200000e-22, 9.600000e-22, 1.190000e-21, 1.400000e-21, 1.590000e-21, 1.760000e-21, 1.910000e-21, 2.050000e-21, 2.160000e-21, 2.240000e-21, 2.310000e-21, 2.380000e-21, 2.380000e-21, 2.360000e-21, 2.270000e-21, 2.090000e-21, 1.940000e-21, 1.310000e-21, 8.800000e-22, 5.900000e-22, 4.000000e-22, 2.700000e-22, 1.800000e-22}
      formula = e+N2X1=>e+N2W3
      targetName = N2X1
      targetLabel = N2X1
    col5: CollisionFeature "5: e+N2X1=>e+N2Bp3" on all domains
      cSeqNo = 5
      de = 8.165
      xscale = 1
      yscale = 1
      type = Excitation
      xdata = {8.165000e+0, 1.000000e+1, 1.050000e+1, 1.100000e+1, 1.150000e+1, 1.200000e+1, 1.250000e+1, 1.300000e+1, 1.350000e+1, 1.400000e+1, 1.450000e+1, 1.500000e+1, 1.550000e+1, 1.600000e+1, 1.650000e+1, 1.700000e+1, 1.750000e+1, 1.800000e+1, 1.850000e+1, 1.900000e+1, 1.950000e+1, 2.000000e+1, 2.500000e+1, 3.000000e+1, 3.500000e+1, 4.000000e+1}
      ydata = {0.000000e+0, 7.000000e-23, 8.000000e-23, 1.900000e-22, 3.700000e-22, 5.800000e-22, 8.200000e-22, 1.050000e-21, 1.250000e-21, 1.430000e-21, 1.550000e-21, 1.630000e-21, 1.650000e-21, 1.620000e-21, 1.530000e-21, 1.400000e-21, 1.240000e-21, 1.100000e-21, 1.010000e-21, 9.300000e-22, 8.600000e-22, 8.000000e-22, 4.100000e-22, 2.400000e-22, 1.500000e-22, 1.000000e-22}
      formula = e+N2X1=>e+N2Bp3
      targetName = N2X1
      targetLabel = N2X1
    col6: CollisionFeature "6: e+N2X1=>e+N2ap1" on all domains
      cSeqNo = 6
      de = 8.4
      xscale = 1
      yscale = 1
      type = Excitation
      xdata = {8.400000e+0, 9.400000e+0, 9.500000e+0, 1.000000e+1, 1.050000e+1, 1.100000e+1, 1.150000e+1, 1.200000e+1, 1.250000e+1, 1.300000e+1, 1.350000e+1, 1.400000e+1, 1.450000e+1, 1.500000e+1, 1.550000e+1, 1.600000e+1, 1.650000e+1, 1.700000e+1, 1.750000e+1, 1.800000e+1, 1.850000e+1, 1.900000e+1, 2.000000e+1, 2.500000e+1, 3.000000e+1, 3.500000e+1, 4.000000e+1, 4.500000e+1, 5.000000e+1}
      ydata = {0.000000e+0, 6.000000e-23, 1.100000e-22, 3.100000e-22, 4.200000e-22, 5.100000e-22, 5.900000e-22, 6.900000e-22, 8.000000e-22, 9.100000e-22, 1.010000e-21, 1.100000e-21, 1.130000e-21, 1.130000e-21, 1.070000e-21, 9.500000e-22, 7.900000e-22, 6.300000e-22, 5.600000e-22, 5.000000e-22, 4.500000e-22, 4.100000e-22, 3.400000e-22, 1.800000e-22, 1.400000e-22, 1.200000e-22, 1.100000e-22, 1.000000e-22, 1.000000e-22}
      formula = e+N2X1=>e+N2ap1
      targetName = N2X1
      targetLabel = N2X1
    col7: CollisionFeature "7: e+N2X1=>e+N2a1" on all domains
      cSeqNo = 7
      de = 8.55
      xscale = 1
      yscale = 1
      type = Excitation
      xdata = {8.550000e+0, 8.560000e+0, 8.750000e+0, 9.000000e+0, 9.500000e+0, 1.000000e+1, 1.100000e+1, 1.200000e+1, 1.300000e+1, 1.400000e+1, 1.500000e+1, 1.550000e+1, 1.600000e+1, 1.650000e+1, 1.700000e+1, 1.750000e+1, 1.800000e+1, 1.900000e+1, 2.150000e+1, 2.500000e+1, 3.000000e+1, 3.500000e+1, 4.000000e+1, 4.500000e+1, 5.000000e+1, 6.000000e+1, 7.000000e+1, 8.000000e+1, 9.000000e+1, 1.000000e+2}
      ydata = {0.000000e+0, 1.000000e-23, 1.600000e-22, 3.800000e-22, 6.600000e-22, 9.900000e-22, 1.740000e-21, 2.540000e-21, 3.290000e-21, 3.940000e-21, 4.430000e-21, 4.590000e-21, 4.690000e-21, 4.730000e-21, 4.710000e-21, 4.620000e-21, 4.460000e-21, 3.940000e-21, 3.000000e-21, 2.580000e-21, 2.150000e-21, 1.850000e-21, 1.610000e-21, 1.440000e-21, 1.290000e-21, 1.080000e-21, 9.200000e-22, 8.100000e-22, 7.200000e-22, 6.500000e-22}
      formula = e+N2X1=>e+N2a1
      targetName = N2X1
      targetLabel = N2X1
    col8: CollisionFeature "8: e+N2X1=>e+N2w1" on all domains
      cSeqNo = 8
      de = 8.89
      xscale = 1
      yscale = 1
      type = Excitation
      xdata = {8.890000e+0, 8.900000e+0, 9.000000e+0, 9.500000e+0, 1.000000e+1, 1.050000e+1, 1.100000e+1, 1.150000e+1, 1.200000e+1, 1.250000e+1, 1.300000e+1, 1.350000e+1, 1.400000e+1, 1.450000e+1, 1.500000e+1, 1.550000e+1, 1.600000e+1, 1.700000e+1, 1.800000e+1, 1.900000e+1, 2.000000e+1, 2.500000e+1, 3.000000e+1, 3.500000e+1, 4.000000e+1, 4.500000e+1, 5.000000e+1}
      ydata = {0.000000e+0, 1.000000e-24, 2.000000e-23, 2.400000e-22, 4.300000e-22, 6.100000e-22, 7.600000e-22, 8.800000e-22, 9.600000e-22, 1.020000e-21, 1.050000e-21, 1.050000e-21, 1.030000e-21, 9.900000e-22, 9.300000e-22, 8.600000e-22, 7.800000e-22, 6.200000e-22, 4.900000e-22, 4.400000e-22, 4.000000e-22, 2.600000e-22, 1.800000e-22, 1.300000e-22, 1.000000e-22, 8.000000e-23, 6.000000e-23}
      formula = e+N2X1=>e+N2w1
      targetName = N2X1
      targetLabel = N2X1
    col9: CollisionFeature "9: e+N2X1=>e+N2C3" on all domains
      cSeqNo = 9
      de = 11.03
      xscale = 1
      yscale = 1
      type = Excitation
      xdata = {1.103000e+1, 1.200000e+1, 1.250000e+1, 1.300000e+1, 1.350000e+1, 1.400000e+1, 1.450000e+1, 1.500000e+1, 1.570000e+1, 1.600000e+1, 1.650000e+1, 1.700000e+1, 1.750000e+1, 1.800000e+1, 1.850000e+1, 1.900000e+1, 1.950000e+1, 2.000000e+1, 2.500000e+1, 3.000000e+1, 3.500000e+1, 4.000000e+1, 4.500000e+1, 5.000000e+1}
      ydata = {0.000000e+0, 1.470000e-21, 2.290000e-21, 3.350000e-21, 4.550000e-21, 5.510000e-21, 5.830000e-21, 5.510000e-21, 4.780000e-21, 4.470000e-21, 4.030000e-21, 3.530000e-21, 3.020000e-21, 2.760000e-21, 2.580000e-21, 2.420000e-21, 2.260000e-21, 2.120000e-21, 1.220000e-21, 7.700000e-22, 5.200000e-22, 3.800000e-22, 2.800000e-22, 2.200000e-22}
      formula = e+N2X1=>e+N2C3
      targetName = N2X1
      targetLabel = N2X1
    col10: CollisionFeature "10: e+N2X1=>e+N2E3" on all domains
      cSeqNo = 10
      de = 11.87
      xscale = 1
      yscale = 1
      type = Excitation
      xdata = {1.187000e+1, 1.195000e+1, 1.200000e+1, 1.250000e+1, 1.300000e+1, 1.400000e+1, 1.500000e+1, 1.600000e+1, 1.700000e+1, 1.800000e+1, 1.900000e+1, 2.000000e+1, 2.100000e+1, 2.500000e+1, 3.000000e+1, 3.500000e+1, 4.000000e+1, 4.500000e+1, 5.000000e+1}
      ydata = {0.000000e+0, 1.200000e-21, 9.500000e-22, 2.900000e-22, 2.000000e-22, 8.000000e-23, 3.000000e-23, 2.000000e-23, 4.000000e-23, 7.000000e-23, 1.000000e-22, 1.200000e-22, 1.200000e-22, 9.000000e-23, 7.000000e-23, 5.000000e-23, 3.000000e-23, 2.500000e-23, 1.800000e-23}
      formula = e+N2X1=>e+N2E3
      targetName = N2X1
      targetLabel = N2X1
    col11: CollisionFeature "11: e+N2X1=>e+N2app1" on all domains
      cSeqNo = 11
      de = 12.25
      xscale = 1
      yscale = 1
      type = Excitation
      xdata = {1.225000e+1, 1.400000e+1, 1.500000e+1, 1.600000e+1, 1.700000e+1, 1.800000e+1, 1.900000e+1, 2.000000e+1, 2.100000e+1, 2.200000e+1, 2.300000e+1, 2.400000e+1, 2.500000e+1, 2.750000e+1, 3.000000e+1, 3.500000e+1, 4.000000e+1, 4.500000e+1, 5.000000e+1}
      ydata = {0.000000e+0, 2.200000e-22, 3.300000e-22, 4.200000e-22, 5.000000e-22, 5.600000e-22, 6.000000e-22, 6.300000e-22, 6.400000e-22, 6.300000e-22, 6.200000e-22, 5.900000e-22, 5.500000e-22, 4.400000e-22, 3.500000e-22, 2.500000e-22, 2.000000e-22, 1.600000e-22, 1.400000e-22}
      formula = e+N2X1=>e+N2app1
      targetName = N2X1
      targetLabel = N2X1
    col12: CollisionFeature "12: e+N2X1=>e+N2+" (disabled) on all domains
      cSeqNo = 12
      de = 15.58
      xscale = 1
      yscale = 1
      type = Ionization
      xdata = {1.558000e+1, 1.600000e+1, 1.650000e+1, 1.700000e+1, 1.750000e+1, 1.800000e+1, 1.850000e+1, 1.900000e+1, 1.950000e+1, 2.000000e+1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}
      ydata = {0.000000e+0, 2.110000e-22, 4.660000e-22, 7.130000e-22, 9.850000e-22, 1.290000e-21, 1.640000e-21, 1.990000e-21, 2.300000e-21, 2.700000e-21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}
      formula = e+N2X1=>e+N2+
      targetName = N2X1
      targetLabel = N2X1
    zef1: ZeroEnergyFlux on all boundaries

Mesh
  mesh1 "Mesh 1"
    size: MeshSizeDefault | hmax = 0.1; hauto = 5; custom = on
    edg1: Edge on remaining entities

Studies
  std1 "Study 1"
    ref: ReducedElectricFields | plist = EN; mesh = {geom1, mesh1}

Solver configurations
  sol1 "Solver 1" (study std1)
    v1: Variables "Dependent Variables 1"
    s1: Stationary "Stationary Solver 1" | nonlin = on
      dDef: Direct
      p1: Parametric | pname = freq; plistarr = EN; pcontinuationmode = no
      fc1: FullyCoupled | linsolver = dDef; dtech = hnlin; maxiter = 100

Datasets
  dset1: Solution | solution = sol1

Plots
  pg1: PlotGroup1D "EEDF (be)" | data = dset1; xlabel = Electron energy (eV); ylabel = EEDF (eV<sup>-3/2</sup>)
    lngr1: LineGraph on all domains | expr = f; xdata = expr; xdataexpr = x
  pg4: PlotGroup1D "Te" | data = dset1; xlabel = E/N (Td); ylabel = Te (eV)
    glob1: Global | expr = be.Te; descr = Electron temperature; autoexpr = on
  pg2: PlotGroup1D "Reduced Transport Properties (be)"
    data = dset1
    xlabel = Mean electron energy (eV)
    ylabel = Reduced transport coefficient
    glob1: Global
      expr = {be.DeN, be.mueN, be.muN, be.DenN}
      unit = {1/(m*s), s^2*A/(m^3*kg), s^2*A/(m^3*kg), 1/(m*s)}
      descr = {Reduced electron diffusivity, Reduced electron energy mobility, Reduced electron mobility, Reduced electron energy diffusivity}
  pg3: PlotGroup1D "Rate Coefficients (be)"
    data = dset1
    xlabel = Mean electron energy (eV)
    ylabel = Rate coefficient (m<sup>3</sup>/s)
    glob1: Global
      expr = {be.k_1, be.k_2, be.k_3, be.k_4, be.k_5, be.k_6, be.k_7, be.k_8, be.k_9, be.k_10, be.k_11}
      descr = {Rate coefficient, Rate coefficient, Rate coefficient, Rate coefficient, Rate coefficient, Rate coefficient, Rate coefficient, Rate coefficient, Rate coefficient, Rate coefficient, Rate coefficient}
      autoexpr = on