// COMSOL Multiphysics 4.4.0.195 model "N2_testing.mph"
// Outline of the model tree

Parameters
  E = 100 [V/m]
  Pg = 1 [Torr]
  Tg = 300 [K]
  NLod = 2.6868e25 [1/m^3]
  Ng = NLod*Pg/(760 [Torr])*273 [K]/Tg
  EN = E/NLod/(1e-21 [V*cm^2])

Geometry
  geom1 "Geometry 1" (1D, length unit m)
    i1: Interval | intervals = one; p2 = 100; p = {0, 100}
    fin: Finalize "Form Union"

Physics
  be: Boltzmann "Boltzmann Equation, Two-Term Approximation" on all domains
    dependent variable f
    eedf.eedf = bolt
    CrossSectionImport.Filepath = /Users/angus/CPP_testing/firstCode/xsecsN2_Itikawa2.txt
    bmdl1: BoltzmannModel (default)
    init1: init "Initial Values 1" (default)
    col1: CollisionFeature "1: e+N2X1=>e+N2X1" on all domains
      cSeqNo = 1
      mratio = 1.958000e-5
      xscale = 1
      yscale = 1
      type = Elastic
      xdata = {0.000000e+0, 1.000000e-3, 1.500000e-3, 1.800000e-3, 2.000000e-3, 2.500000e-3, 3.000000e-3, 4.000000e-3, 5.000000e-3, 6.000000e-3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}
      ydata = {1.357000e-20, 1.357000e-20, 1.426000e-20, 1.464000e-20, 1.490000e-20, 1.550000e-20, 1.620000e-20, 1.718000e-20, 1.810000e-20, 1.908000e-20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}
      formula = e+N2X1=>e+N2X1
      targetName = N2X1
      targetLabel = N2X1
    col2: CollisionFeature "2: e+N2X1=>e+N2A3" on all domains
      cSeqNo = 2
      de = 6.169
      gw = 1
      xscale = 1
      yscale = 1
      type = Excitation
      xdata = {6.169000e+0, 7.650000e+0, 7.960000e+0, 8.260000e+0, 8.520000e+0, 8.740000e+0, 9.570000e+0, 1.040000e+1, 1.096000e+1, 1.153000e+1, 1.188000e+1, 1.197000e+1, 1.210000e+1, 1.223000e+1, 1.254000e+1, 1.315000e+1, 1.390000e+1, 1.485000e+1, 1.500000e+1, 1.600000e+1, 1.700000e+1, 1.800000e+1, 1.900000e+1, 2.000000e+1, 2.500000e+1, 3.000000e+1, 3.500000e+1, 4.000000e+1, 4.500000e+1, 5.000000e+1}
      ydata = {0.000000e+0, 5.000000e-23, 4.800000e-22, 8.500000e-22, 1.250000e-21, 1.370000e-21, 1.530000e-21, 1.680000e-21, 1.830000e-21, 2.260000e-21, 2.510000e-21, 2.540000e-21, 2.570000e-21, 2.540000e-21, 2.390000e-21, 2.020000e-21, 1.800000e-21, 1.620000e-21, 1.600000e-21, 1.520000e-21, 1.450000e-21, 1.380000e-21, 1.320000e-21, 1.260000e-21, 9.900000e-22, 7.800000e-22, 6.200000e-22, 4.900000e-22, 3.800000e-22, 3.000000e-22}
      formula = e+N2X1=>e+N2A3
      targetName = N2X1
      targetLabel = N2X1
    col3: CollisionFeature "3: e+N2A3=>e+N2X1" (disabled) on all domains
      cSeqNo = 3
      de = -6.169
      gw = 1
      xscale = 1
      yscale = 1
      type = Excitation
      xdata = {0.0, 1.481, 1.791, 2.091, 2.351, 2.571, 3.401, 4.231, 4.791, 5.361, 5.711, 5.801, 5.931, 6.061, 6.371, 6.981, 7.731, 8.681, 8.831, 9.831, 10.831, 11.831, 12.831, 13.831, 18.831, 23.831, 28.831, 33.831, 38.831, 43.831}
      ydata = {0.0, 5.0E-23, 4.8E-22, 8.5E-22, 1.25E-21, 1.37E-21, 1.53E-21, 1.68E-21, 1.83E-21, 2.26E-21, 2.51E-21, 2.54E-21, 2.57E-21, 2.54E-21, 2.39E-21, 2.02E-21, 1.8E-21, 1.62E-21, 1.6E-21, 1.52E-21, 1.45E-21, 1.38E-21, 1.32E-21, 1.26E-21, 9.9E-22, 7.8E-22, 6.2E-22, 4.9E-22, 3.8E-22, 3.0E-22}
      formula = e+N2A3=>e+N2X1
      targetName = N2A3
      targetLabel = N2A3
    zef1: ZeroEnergyFlux on all boundaries
    zp1: ZeroProbability (disabled) on boundaries 2

Mesh
  mesh1 "Mesh 1"
    size: MeshSizeDefault | hmax = 0.1; hauto = 5; custom = on
    edg1: Edge on remaining entities
  mesh2 "Mesh 2"
    size: MeshSizeDefault | hmax = 0.5; hmin = 0.03; hcurve = 0.3; hnarrow = 1; hgrad = 1.3; hauto = 5; custom = on
    edg1: Edge on remaining entities
      size1: Size on boundaries 1
        hmax = 0.1
        hmin = 0.03
        hcurve = 0.3
        hnarrow = 1
        hgrad = 1.3
        hauto = 5
        custom = on

Studies
  std1 "Study 1"
    ref: ReducedElectricFields | plist = EN; mesh = {geom1, mesh1}

Solver configurations
  sol1 "Solver 1" (study std1)
    v1: Variables "Dependent Variables 1"
    s1: Stationary "Stationary Solver 1"
      dDef: Direct
      p1: Parametric | pname = freq; plistarr = EN; pcontinuationmode = no
      fc1: FullyCoupled | linsolver = dDef

Datasets
  dset1: Solution | solution = sol1

Plots
  pg1: PlotGroup1D "EEDF (be)" | data = dset1; xlabel = Electron energy (eV); ylabel = EEDF (eV<sup>-3/2</sup>)
    lngr1: LineGraph on all domains | expr = f; xdata = expr; xdataexpr = x
  pg2: PlotGroup1D "Reduced Transport Properties (be)"
    data = dset1
    xlabel = Mean electron energy (eV)
    ylabel = Reduced transport coefficient
    glob1: Global
      expr = {be.DeN, be.mueN, be.muN, be.DenN}
      unit = {1/(m*s), s^2*A/(m^3*kg), s^2*A/(m^3*kg), 1/(m*s)}
      descr = {Reduced electron diffusivity, Reduced electron energy mobility, Reduced electron mobility, Reduced electron energy diffusivity}
  pg3: PlotGroup1D "Rate Coefficients (be)"
    data = dset1
    xlabel = Mean electron energy (eV)
    ylabel = Rate coefficient (m<sup>3</sup>/s)
    glob1: Global | expr = {be.k_1, be.k_2}; descr = {Rate coefficient, Rate coefficient}; autoexpr = on
  pg4: PlotGroup1D "Te" | data = dset1; xlabel = Mean electron energy (eV); ylabel = Rate coefficient (m<sup>3</sup>/s)
    glob1: Global | expr = be.ebar*2/3; descr = Temperature; autoexpr = on